// COMSOL Multiphysics 6.2.0.260 model "stress_dependent_elasticity.mph"
// Modeling Stress Dependent Elasticity
// This example shows how to implement a stress dependent elasticity problem. Young's modulus depends on the stress.
// Outline of the model tree

Functions
  step1: Step | funcname = E0; location = 0[Pa]; from = 3e8[Pa]; to = 7e8[Pa]; smooth = 1e3

Geometry
  geom1 "Geometry 1" (2D, length unit m)
    r1: Rectangle | size = {10[cm], 1[cm]}
    fin: Finalize "Form Union"

Materials
  mat1: Common "Material 1" on all domains
    def "Basic"
      density = 0
    Enu "Young's modulus and Poisson's ratio"
      E = E0(p)
      nu = 0.3

Physics
  solid: SolidMechanics on all domains
    dependent variable u = {u, v, w}
    lemm1: LinearElasticModel "Linear Elastic Material 1" (default)
    free1: Free (default)
    init1: init "Initial Values 1" (default)
    roll1: Roller on boundaries 1
    fix1: Fixed "Fixed Constraint 1" on points 1
    bndl1: BoundaryLoad on boundaries 4 | LoadType = Resultant; M = {0, 0, -(5/3)[N*m]}
    weak1: WeakContribution on domains 1
      integrationOrder = 4
      quadratureFrame = spatial
      weakExpression = test(p)*(p-solid.pm)
      automaticQuadrature = 1
      aux1: AuxiliaryField "Auxiliary Dependent Variable 1" on all domains
        fieldVariableName = p
        shapeFunctionType = shgp
        order = 4

Mesh
  mesh1 "Mesh 1"
    size: MeshSizeDefault | hmax = 0.0067; hmin = 3.0E-5; hcurve = 0.3; hgrad = 1.3
    map1: Map "Mapped 1" on remaining entities
      dis1: Distribution on boundaries 1 | numelem = 20
      dis2: Distribution on boundaries 2 | numelem = 50

Studies
  std1 "Study 1"
    stat: Stationary

Solver configurations
  sol1 "Solution 1" (study std1)
    v1: Variables "Dependent Variables 1"
    s1: Stationary "Stationary Solver 1"
      dDef: Direct
      fc1: FullyCoupled | linsolver = dDef; dtech = const

Datasets
  dset1: Solution | solution = sol1
  cln1: CutLine2D | data = dset1; genpoints = {{5[cm], 0}, {5[cm], 1[cm]}}

Plots
  pg1: PlotGroup2D "Stress (solid)" | data = dset1
    surf1: Surface | expr = solid.misesGp
      def: Deform "Deformation" | expr = {u, v}; descr = Displacement field
  pg2: PlotGroup2D "Boundary Loads (solid)" | data = dset1
    arwl1: ArrowLine "Boundary Load 1" | expr = {solid.bndl1.F_Ax, solid.bndl1.F_Ay}
      col: Color "Color Expression" | expr = sqrteps(real(solid.bndl1.F_Ax)^2+real(solid.bndl1.F_Ay)^2)
      def: Deform "Deformation" | expr = {u, v}; descr = Displacement field
    surf1: Surface "Gray Surfaces" | expr = 1
      def: Deform "Deformation" | expr = {u, v}; descr = Displacement field
      sel1: Selection on domains 1
  pg3: PlotGroup2D "Young's Modulus" | data = dset1
    surf1: Surface | expr = solid.E; unit = MPa; descr = Young's modulus
      def1: Deform "Deformation 1" | expr = {u, v}
  pg4: PlotGroup1D "Stress Through Thickness" | data = cln1
    lngr1: LineGraph | expr = solid.sx; unit = kPa